n := 6
i := 0 .. 5
j := 0 .. 5
ЖК_Краснодара := [Аленка, Милка, Риттер_Спорт, АльпенГолд, Россия, Воздушный]
Вкус := [
    1, 1/3, 1/5, 3, 3, 3;
    3, 1, 5, 3, 3, 5;
    5, 1/5, 1, 5, 5, 3;
    1/3, 1/3, 1/5, 1, 1, 1/3;
    1/3, 1/3, 1/5, 1, 1, 1/3;
    1/3, 1/5, 1/3, 3, 3, 1
]
Упаковка := [
    1, 1/3, 1/5, 3, 3, 3;
    3, 1, 1/3, 5, 5, 3;
    5, 3, 1, 5, 5, 5;
    1/3, 1/5, 1/5, 1, 1, 1/3;
    1/3, 1/5, 1/5, 1, 1, 1;
    1/3, 1/3, 1/5, 3, 1, 1
]
Количество_ингридиентов := [
    1, 1, 1/3, 5, 3, 3;
    1, 1, 1, 5, 3, 3;
    3, 1, 1, 5, 3, 3;
    1/5, 1/5, 1/5, 1, 1/3, 1/3;
    1/3, 1/3, 1/3, 3, 1, 1;
    1/3, 1/3, 1/3, 3, 1, 1
]
Размер_квартиры_планировка := [
    1, 1/3, 3, 1, 1, 1/5;
    3, 1, 5, 3, 3, 1/3;
    1/3, 1/5, 1, 1/3, 1/3, 1/5;
    1, 1/3, 3, 1, 1, 1/5;
    1, 1/3, 3, 1, 1, 1/5;
    5, 3, 5, 5, 5, 1
]
Безопасность_Инфраструктура := [
    1, 5, 7, 5, 1, 1/7;
    1/5, 1, 1, 1/5, 1/5, 1/7;
    1/7, 1, 1, 1/5, 1/7, 1/7;
    1/5, 5, 5, 1, 1/3, 1/7;
    1, 5, 7, 3, 1, 1/5;
    7, 7, 7, 7, 5, 1
]
Благоустройство_двора := [
    1, 1/5, 1/5, 1/3, 1, 1/7;
    5, 1, 1, 5, 5, 1;
    5, 1, 1, 3, 5, 1/3;
    3, 1/5, 1/3, 1, 3, 1/7;
    1, 1/5, 1/5, 1/3, 1, 1/7;
    7, 1, 3, 7, 7, 1
]
Критерии := [
    1, 3, 5, 1, 5, 5;
    1/3, 1, 5, 1/3, 3, 5;
    1/5, 1/5, 1, 1/5, 1/3, 1;
    1, 3, 5, 1, 3, 5;
    1/5, 1/3, 3, 1/3, 1, 3;
    1/5, 1/5, 1, 1/5, 1/3, 1
]
A := [Вкус, Упаковка, Количество_ингридиентов, Аромат, Калории, Цена, Критерии]
W := [0, 0, 0, 0, 0, 0, 0]
k := 0
Ak := A[0, k]
w[i] := nthroot(product(Ak[i, j], j = 0 .. n - 1), n)
sum := sum(w[i], i = 0 .. n - 1)
w0 := w/sum
W[:, k] := w0
a[i] := sum(Ak[j, i], j = 0 .. n - 1)
lambda := sum(w0[i]*a[i], i = 0 .. n - 1)
Ic := (lambda - n)/(6 - 1)
k := 1
Ak := A[0, k]
w[i] := nthroot(product(Ak[i, j], j = 0 .. n - 1), n)
sum := sum(w[i], i = 0 .. n - 1)
w0 := w/sum
W[:, k] := w0
a[i] := sum(Ak[j, i], j = 0 .. n - 1)
lambda := sum(w0[i]*a[i], i = 0 .. n - 1)
Ic := (lambda - n)/(n - 1)
k := 2
Ak := A[0, k]
w[i] := nthroot(product(Ak[i, j], j = 0 .. n - 1), n)
sum := sum(w[i], i = 0 .. n - 1)
w0 := w/sum
W[:, k] := w0
a[i] := sum(Ak[j, i], j = 0 .. n - 1)
lambda := sum(w0[i]*a[i], i = 0 .. n - 1)
Ic := (lambda - n)/(6 - 1)
k := 3
Ak := A[0, k]
w[i] := nthroot(product(Ak[i, j], j = 0 .. n - 1), n)
sum := sum(w[i], i = 0 .. n - 1)
w0 := w/sum
W[:, k] := w0
a[i] := sum(Ak[j, i], j = 0 .. n - 1)
lambda := sum(w0[i]*a[i], i = 0 .. n - 1)
Ic := (lambda - n)/(n - 1)
k := 4
Ak := A[0, k]
w[i] := nthroot(product(Ak[i, j], j = 0 .. n - 1), n)
sum := sum(w[i], i = 0 .. n - 1)
w0 := w/sum
W[:, k] := w0
a[i] := sum(Ak[j, i], j = 0 .. n - 1)
lambda := sum(w0[i]*a[i], i = 0 .. n - 1)
Ic := (lambda - n)/(n - 1)
k := 5
Ak := A[0, k]
w[i] := nthroot(product(Ak[i, j], j = 0 .. n - 1), n)
sum := sum(w[i], i = 0 .. n - 1)
w0 := w/sum
W[:, k] := w0
a[i] := sum(Ak[j, i], j = 0 .. n - 1)
lambda := sum(w0[i]*a[i], i = 0 .. n - 1)
Ic := (lambda - n)/(n - 1)
k := 6
Ak := A[0, k]
w[i] := nthroot(product(Ak[i, j], j = 0 .. n - 1), n)
sum := sum(w[i], i = 0 .. n - 1)
w0 := w/sum
W[:, k] := w0
a[i] := sum(Ak[j, i], j = 0 .. n - 1)
lambda := sum(w0[i]*a[i], i = 0 .. n - 1)
Ic := (lambda - n)/(n - 1)
W =  # error: Эта переменная не определена. Проверьте правильность установки обозначения.
W0 := W[:, 0]
# ЖК_Ставропольский
# ЖК_Сказка_град
l := 0 .. 5
Wkoef[l] := sum(W0[i]*W[:, l + 1][i], i = 0 .. n - 1)  # ЖК_Самолет
# ЖК_Фонтаны
# ЖК_Севастопольский
# ЖК_Тургенев
